// COMSOL Multiphysics 6.0.0.405 model "ellipsoid_beta-ramp.mph"
// Outline of the model tree
// Unit system: none

Parameters
  K = 1
  pert = 0.01
  Kn = 1000
  r0 = 2
  tInit = 200
  tMax = 10000
  betaMax = 3*r0^2
  a = 6
  b = 6

Functions
  rn1: Random | funcname = rand; nargs = 4; type = normal; seed = 1
  rm1: Ramp | funcname = ramp
  step1: Step | funcname = step; from = 1; to = 0

Variables
  var1 "Variables 1"
    beta = betaMax * ramp((t - tInit)/(tMax - tInit))
    c = exp(-(x^2 + y^2 + (z - b)^2)/(2*r0^2))
    normQ2 = 2*(q1^2 + q2^2 + q3^2 + q1*q4 + q4^2 + q5^2)  // Scalar order param S^2 = 2 Tr Q^2
    dcNorm2 = dtang(c,x)^2 + dtang(c,y)^2 + dtang(c,z)^2
    fa1 = -1/3*dcNorm2 + dtang(c,x)^2
    fa2 = dtang(c,x)*dtang(c,y)
    fa3 = dtang(c,x)*dtang(c,z)
    fa4 = -1/3*dcNorm2 + dtang(c,y)^2
    fa5 = dtang(c,y)*dtang(c,z)
    gradQ11 = -((1 - nx^2)^2*q1Tx) + 2*nx*(1 - nx^2)*ny*q2Tx + 2*nx*(1 - nx^2)*nz*q3Tx - nx^2*nz^2*(-q1Tx - q4Tx) - nx^2*ny^2*q4Tx - 2*nx^2*ny*nz*q5Tx + ((1 - nx^2)*q1Tx - 2*nx*ny*q2Tx - 2*nx*nz*q3Tx + (1 - nz^2)*(-q1Tx - q4Tx) + (1 - ny^2)*q4Tx - 2*ny*nz*q5Tx)/3.
    gradQ12 = -((1 - nx^2)^2*q1Ty) + 2*nx*(1 - nx^2)*ny*q2Ty + 2*nx*(1 - nx^2)*nz*q3Ty - nx^2*nz^2*(-q1Ty - q4Ty) - nx^2*ny^2*q4Ty - 2*nx^2*ny*nz*q5Ty + ((1 - nx^2)*q1Ty - 2*nx*ny*q2Ty - 2*nx*nz*q3Ty + (1 - nz^2)*(-q1Ty - q4Ty) + (1 - ny^2)*q4Ty - 2*ny*nz*q5Ty)/3.
    gradQ13 = -((1 - nx^2)^2*q1Tz) + 2*nx*(1 - nx^2)*ny*q2Tz + 2*nx*(1 - nx^2)*nz*q3Tz - nx^2*nz^2*(-q1Tz - q4Tz) - nx^2*ny^2*q4Tz - 2*nx^2*ny*nz*q5Tz + ((1 - nx^2)*q1Tz - 2*nx*ny*q2Tz - 2*nx*nz*q3Tz + (1 - nz^2)*(-q1Tz - q4Tz) + (1 - ny^2)*q4Tz - 2*ny*nz*q5Tz)/3.
    gradQ21 = nx*(1 - nx^2)*ny*q1Tx - nx^2*ny^2*q2Tx - (1 - nx^2)*(1 - ny^2)*q2Tx - nx^2*ny*nz*q3Tx + (1 - nx^2)*ny*nz*q3Tx - nx*ny*nz^2*(-q1Tx - q4Tx) + nx*ny*(1 - ny^2)*q4Tx - nx*ny^2*nz*q5Tx + nx*(1 - ny^2)*nz*q5Tx
    gradQ22 = nx*(1 - nx^2)*ny*q1Ty - nx^2*ny^2*q2Ty - (1 - nx^2)*(1 - ny^2)*q2Ty - nx^2*ny*nz*q3Ty + (1 - nx^2)*ny*nz*q3Ty - nx*ny*nz^2*(-q1Ty - q4Ty) + nx*ny*(1 - ny^2)*q4Ty - nx*ny^2*nz*q5Ty + nx*(1 - ny^2)*nz*q5Ty
    gradQ23 = nx*(1 - nx^2)*ny*q1Tz - nx^2*ny^2*q2Tz - (1 - nx^2)*(1 - ny^2)*q2Tz - nx^2*ny*nz*q3Tz + (1 - nx^2)*ny*nz*q3Tz - nx*ny*nz^2*(-q1Tz - q4Tz) + nx*ny*(1 - ny^2)*q4Tz - nx*ny^2*nz*q5Tz + nx*(1 - ny^2)*nz*q5Tz
    gradQ31 = nx*(1 - nx^2)*nz*q1Tx - nx^2*ny*nz*q2Tx + (1 - nx^2)*ny*nz*q2Tx - nx^2*nz^2*q3Tx - (1 - nx^2)*(1 - nz^2)*q3Tx + nx*nz*(1 - nz^2)*(-q1Tx - q4Tx) - nx*ny^2*nz*q4Tx - nx*ny*nz^2*q5Tx + nx*ny*(1 - nz^2)*q5Tx
    gradQ32 = nx*(1 - nx^2)*nz*q1Ty - nx^2*ny*nz*q2Ty + (1 - nx^2)*ny*nz*q2Ty - nx^2*nz^2*q3Ty - (1 - nx^2)*(1 - nz^2)*q3Ty + nx*nz*(1 - nz^2)*(-q1Ty - q4Ty) - nx*ny^2*nz*q4Ty - nx*ny*nz^2*q5Ty + nx*ny*(1 - nz^2)*q5Ty
    gradQ33 = nx*(1 - nx^2)*nz*q1Tz - nx^2*ny*nz*q2Tz + (1 - nx^2)*ny*nz*q2Tz - nx^2*nz^2*q3Tz - (1 - nx^2)*(1 - nz^2)*q3Tz + nx*nz*(1 - nz^2)*(-q1Tz - q4Tz) - nx*ny^2*nz*q4Tz - nx*ny*nz^2*q5Tz + nx*ny*(1 - nz^2)*q5Tz
    gradQ41 = -(nx^2*ny^2*q1Tx) + 2*nx*ny*(1 - ny^2)*q2Tx - 2*nx*ny^2*nz*q3Tx - ny^2*nz^2*(-q1Tx - q4Tx) - (1 - ny^2)^2*q4Tx + 2*ny*(1 - ny^2)*nz*q5Tx + ((1 - nx^2)*q1Tx - 2*nx*ny*q2Tx - 2*nx*nz*q3Tx + (1 - nz^2)*(-q1Tx - q4Tx) + (1 - ny^2)*q4Tx - 2*ny*nz*q5Tx)/3.
    gradQ42 = -(nx^2*ny^2*q1Ty) + 2*nx*ny*(1 - ny^2)*q2Ty - 2*nx*ny^2*nz*q3Ty - ny^2*nz^2*(-q1Ty - q4Ty) - (1 - ny^2)^2*q4Ty + 2*ny*(1 - ny^2)*nz*q5Ty + ((1 - nx^2)*q1Ty - 2*nx*ny*q2Ty - 2*nx*nz*q3Ty + (1 - nz^2)*(-q1Ty - q4Ty) + (1 - ny^2)*q4Ty - 2*ny*nz*q5Ty)/3.
    gradQ43 = -(nx^2*ny^2*q1Tz) + 2*nx*ny*(1 - ny^2)*q2Tz - 2*nx*ny^2*nz*q3Tz - ny^2*nz^2*(-q1Tz - q4Tz) - (1 - ny^2)^2*q4Tz + 2*ny*(1 - ny^2)*nz*q5Tz + ((1 - nx^2)*q1Tz - 2*nx*ny*q2Tz - 2*nx*nz*q3Tz + (1 - nz^2)*(-q1Tz - q4Tz) + (1 - ny^2)*q4Tz - 2*ny*nz*q5Tz)/3.
    gradQ51 = -(nx^2*ny*nz*q1Tx) - nx*ny^2*nz*q2Tx + nx*(1 - ny^2)*nz*q2Tx - nx*ny*nz^2*q3Tx + nx*ny*(1 - nz^2)*q3Tx + ny*nz*(1 - nz^2)*(-q1Tx - q4Tx) + ny*(1 - ny^2)*nz*q4Tx - ny^2*nz^2*q5Tx - (1 - ny^2)*(1 - nz^2)*q5Tx
    gradQ52 = -(nx^2*ny*nz*q1Ty) - nx*ny^2*nz*q2Ty + nx*(1 - ny^2)*nz*q2Ty - nx*ny*nz^2*q3Ty + nx*ny*(1 - nz^2)*q3Ty + ny*nz*(1 - nz^2)*(-q1Ty - q4Ty) + ny*(1 - ny^2)*nz*q4Ty - ny^2*nz^2*q5Ty - (1 - ny^2)*(1 - nz^2)*q5Ty
    gradQ53 = -(nx^2*ny*nz*q1Tz) - nx*ny^2*nz*q2Tz + nx*(1 - ny^2)*nz*q2Tz - nx*ny*nz^2*q3Tz + nx*ny*(1 - nz^2)*q3Tz + ny*nz*(1 - nz^2)*(-q1Tz - q4Tz) + ny*(1 - ny^2)*nz*q4Tz - ny^2*nz^2*q5Tz - (1 - ny^2)*(1 - nz^2)*q5Tz
    nf1 = 2*nx*(nx*q1 + ny*q2 + nz*q3) - ((1 + nx^2)*(nx^2*q1 + 2*nx*(ny*q2 + nz*q3) + ny^2*q4 - nz^2*(q1 + q4) + 2*ny*nz*q5))/2.
    nf2 = ny*(nx*q1 + ny*q2 + nz*q3) + nx*(nx*q2 + ny*q4 + nz*q5) - (nx*ny*(nx^2*q1 + 2*nx*(ny*q2 + nz*q3) + ny^2*q4 - nz^2*(q1 + q4) + 2*ny*nz*q5))/2.
    nf3 = nz*(nx*q1 + ny*q2 + nz*q3) + nx*(nx*q3 - nz*(q1 + q4) + ny*q5) - (nx*nz*(nx^2*q1 + 2*nx*(ny*q2 + nz*q3) + ny^2*q4 - nz^2*(q1 + q4) + 2*ny*nz*q5))/2.
    nf4 = 2*ny*(nx*q2 + ny*q4 + nz*q5) - ((1 + ny^2)*(nx^2*q1 + 2*nx*(ny*q2 + nz*q3) + ny^2*q4 - nz^2*(q1 + q4) + 2*ny*nz*q5))/2.
    nf5 = ny*(nx*q3 - nz*(q1 + q4) + ny*q5) + nz*(nx*q2 + ny*q4 + nz*q5) - (ny*nz*(nx^2*q1 + 2*nx*(ny*q2 + nz*q3) + ny^2*q4 - nz^2*(q1 + q4) + 2*ny*nz*q5))/2.

Geometry
  geom1 "Geometry 1" (3D, length unit m)
    sph1: Sphere (disabled)
    elp1: Ellipsoid | semiaxes = {a, a, b}
    fin: Finalize "Form Union"

Physics
  gb: GeneralFormBoundaryPDE on all boundaries
    dependent variable q = {q1, q2, q3, q4, q5}
    ShapeProperty.order = 2
    gfeq1: GeneralFormPDE (default)
      f = {(1 - normQ2)*q1 - Kn*nf1 + beta*fa1, (1 - normQ2)*q2 - Kn*nf2 + beta*fa2, (1 - normQ2)*q3 - Kn*nf3 + beta*fa3, (1 - normQ2)*q4 - Kn*nf4 + beta*fa4, (1 - normQ2)*q5 - Kn*nf5 + beta*fa5}
      Ga = 
        {K*gradQ11, K*gradQ12, K*gradQ13}
        {K*gradQ21, K*gradQ22, K*gradQ23}
        {K*gradQ31, K*gradQ32, K*gradQ33}
        {K*gradQ41, K*gradQ42, K*gradQ43}
        {K*gradQ51, K*gradQ52, K*gradQ53}
      da = {1, 0, 0, 0, 0, 0, 1, 0, 0, 0, 0, 0, 1, 0, 0, 0, 0, 0, 1, 0, 0, 0, 0, 0, 1}
    init1: init "Initial Values 1" (default)
      q1 = pert*rand(x,y,z,1) + 0 * step(z+0.5) * (-(x^2 - 2*z^2)/(eps + x^2 + z^2)/3)
      q2 = pert*rand(x,y,z,2) + 0 * step(z+0.5) * 0
      q3 = pert*rand(x,y,z,3) + 0 * step(z+0.5) * (-(x*z)/(eps + x^2 + z^2))
      q4 = pert*rand(x,y,z,4) + 0 * step(z+0.5) * (-1/3)
      q5 = pert*rand(x,y,z,5) + 0 * step(z+0.5) * 0

Mesh
  mesh1 "Mesh 1"
    size: MeshSizeDefault | hmax = 0.4; custom = on
    ftri1: FreeTri "Free Triangular 1" on all boundaries

Studies
  std1 "Study 1"
    time: Transient "Time Dependent" | tlist = range(0,tMax/100,tMax); usertol = on; rtol = 1e-4

Solver configurations
  sol1 "Solution 1" (study std1)
    v1: Variables "Dependent Variables 1"
    t1: Time "Time-Dependent Solver 1" | tlist = range(0,tMax/100,tMax)
      dDef: Direct | linsolver = pardiso
      fc1: FullyCoupled | linsolver = dDef

Datasets
  dset1: Solution | solution = sol1

Plots
  pg2: PlotGroup3D "Q-tensor norm" | data = dset1
    surf1: Surface | expr = normQ2
    arws1: ArrowSurface (disabled) | expr = {nx, ny, nz}
  pg1: PlotGroup3D "Q-tensor normal component" | data = dset1
    surf1: Surface
      expr = sqrt((nx*q1 + ny*q2 + nz*q3)^2 + (nx*q3 + nz*(-q1 - q4) + ny*q5)^2 + (nx*q2 + ny*q4 + nz*q5)^2)
  pg3: PlotGroup3D "Concentration Field + Director" | data = dset1
    surf1: Surface | expr = c
    arws1: ArrowSurface
      expr = {sqrt(abs(0.5*(1 - nx^2) + (q1)/sqrt(2*normQ2))) * sign( q3/sqrt(2*normQ2) - nx*nz/2 ), sqrt(abs(0.5*(1 - ny^2) + (q4)/sqrt(2*normQ2))) * sign( q5/sqrt(2*normQ2) - ny*nz/2 ), sqrt(abs(0.5*(1 - nz^2) + (-q1 - q4)/sqrt(2*normQ2)))}
      arrowcount = 400
    arws2: ArrowSurface
      expr = {-sqrt(abs(0.5*(1 - nx^2) + (q1)/sqrt(2*normQ2))) * sign(q3/sqrt(2*normQ2) - nx*nz/2 ), -sqrt(abs(0.5*(1 - ny^2) + (q4)/sqrt(2*normQ2))) * sign(q5/sqrt(2*normQ2) - ny*nz/2 ), -sqrt(abs(0.5*(1 - nz^2) + (-q1 - q4)/sqrt(2*normQ2)))}
      arrowcount = 400

Exports
  data1: Data
    data = dset1
    expr = {q1, q2, q3, q4, q5, c}
    exporttype = vtu
    filename = /Users/Fridtjof.Brauns/KITP/Surface Q-tensor/COMSOL/Gradient Alignment/sphere_R=6_beta=1.5r0sq_r0=1.5.vtu
    level = surface
    lagorder = 2
    gporder = 2
  mesh1: Mesh | data = dset1; type3D = stlascii; filename = /Users/Fridtjof.Brauns/KITP/Surface Q-tensor/COMSOL/mesh.stl
  anim1: Animation | type = imageseq; framesel = all; width = 500; height = 500; synchronize = off