// COMSOL Multiphysics 6.0.0.405 model "square_unbinding-sweep_setup_.mph"
// Outline of the model tree
// Unit system: none

Parameters
  K = 1
  r0 = 6
  betaMax = -500*K
  pert = 0
  L = 100
  tMax = 200000

Functions
  rn1: Random | funcname = rand; nargs = 3; type = normal; seed = 113013

Variables
  var1 "Variables 1"
    c = exp(-(x^2+y^2)/(2 * r0^2))
    beta = if(t < tMax, t * betaMax/tMax, (2 - t/tMax)*betaMax)

Geometry
  geom1 "Geometry 1" (2D, length unit m)
    sq1: Square | pos = {-L/2, -L/2}; size = L
    fin: Finalize "Form Union"

Physics
  g: GeneralFormPDE on all domains
    dependent variable u = {p, q}
    gfeq1: GeneralFormPDE (default)
      f = {p - (p*p + q*q)*p + beta/2*(d(c,x)^2 - d(c,y)^2), q - (p*p + q*q)*q + beta*d(c,x)*d(c,y)}
      Ga = {{-K*px, -K*py}, {-K*qx, -K*qy}}
      da = {1, 0, 0, 1}
    zflx1: ZeroFluxBoundary "Zero Flux 1" (default)
    init1: init "Initial Values 1" (default) | p = 1 + pert*rand(x,y,1); q = 0 + pert*rand(x,y,2)
    dir1: DirichletBoundary "Dirichlet Boundary Condition 1" (disabled) on all boundaries
      r = {cos(pi/4 + atan2(y,x)), sin(pi/4 + atan2(y,x))}

Mesh
  mesh1 "Mesh 1"
    size: MeshSizeDefault | hmax = 1.2; custom = on
    ftri1: FreeTri "Free Triangular 1" on remaining entities | method = del

Studies
  std1 "Study 1"
    time: Transient "Time Dependent"
      tlist = range(0,tMax/250,2*tMax)
      usertol = on
      rtol = 1e-4
      sweeptype = filled
      pname = {r0, betaMax}
      plistarr = {range(0.2,0.1,0.5), -K*10^range(0,0.26,1.3)}
      punit = {, }

Solver configurations
  sol1 "Solution 1" (study std1)
    v1: Variables "Dependent Variables 1"
    t1: Time "Time-Dependent Solver 1"
      tlist = range(0,tMax/250,2*tMax)
      atolglobalvaluemethod = manual
      atolglobal = 1e-4
      dDef: Direct | linsolver = pardiso
      fc1: FullyCoupled | linsolver = dDef

Datasets
  dset1: Solution | solution = sol1

Derived values
  max1: MaxSurface "Surface Maximum 1" on domains 1 | data = dset1; table = tbl3; expr = sqrt(p^2 + q^2)

Tables
  tbl1: Table
    // Surface Maximum 1
    Time | p | q
    0 | 1 | 0
    800 | 1.00441 | 0.0730182
    1600 | 1.00846 | 0.146781
    2400 | 1.0122 | 0.218972
    3200 | 1.01567 | 0.289022
    4000 | 1.01895 | 0.356298
    4800 | 1.02206 | 0.420216
    5600 | 1.02505 | 0.480838
    6400 | 1.02796 | 0.537516
    7200 | 1.03081 | 0.590395
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  tbl3: Table
    // Surface Maximum 1
    Time | p | q | sqrt(p^2 + q^2)
    0 | 1 | 0 | 1
    800 | 1.00441 | 0.0730182 | 1.00442
    1600 | 1.00846 | 0.146781 | 1.00847
    2400 | 1.0122 | 0.218972 | 1.0122
    3200 | 1.01567 | 0.289022 | 1.01568
    4000 | 1.01895 | 0.356298 | 1.01896
    4800 | 1.02206 | 0.420216 | 1.02208
    5600 | 1.02505 | 0.480838 | 1.02507
    6400 | 1.02796 | 0.537516 | 1.02798
    7200 | 1.03081 | 0.590395 | 1.03085
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
Plots
  pg2: PlotGroup2D "Director and Magnitude" | data = dset1; typeintitle = off; descriptionintitle = off
    arws1: ArrowSurface | expr = {-sin(atan2(q,p)/2), cos(atan2(q,p)/2)}; xnumber = 30; ynumber = 30
    arws2: ArrowSurface | expr = {sin(atan2(q,p)/2), -cos(atan2(q,p)/2)}; xnumber = 30; ynumber = 30
    surf1: Surface | expr = sqrt(p^2 + q^2)
    str1: Streamline (disabled) | expr = {sqrt(p + sqrt(p^2 + q^2)), sign(q)*sqrt(-p + sqrt(p^2 + q^2))}; udist = 0.02
  pg3: PlotGroup2D "Gradient" | data = dset1
    surf1: Surface | expr = c
  pg5: PlotGroup2D "Director anlge (for export)" | data = dset1
    surf1: Surface | expr = atan2(q, p)
  pg6: PlotGroup2D "Order magnitude (for export)" | data = dset1
    surf1: Surface | expr = sqrt(p^2 + q^2)

Exports
  anim1: Animation | type = imageseq; framesel = all; width = 480
  data1: Data
    data = dset1
    expr = {p, q}
    filename = /Users/Fridtjof.Brauns/KITP/Nematic Alignment/COMSOL/Movie Rendering/unbinding-sweep_r0=6.txt
    location = regulargrid
    regulargridx2 = 24
    regulargridy2 = 24
  anim2: Animation "Director angle frames" | type = imageseq; framesel = all; width = 100; height = 100
  anim3: Animation "Order magnitude frames" | type = imageseq; framesel = all; width = 100; height = 100