// COMSOL Multiphysics 6.0.0.405 model "shrinking-bump_setup.mph"
// Outline of the model tree
// Unit system: none

Parameters
  K = 0.01
  pert = 0.01
  Kn = 100
  theta = 0
  tMax = 20000
  R = 6*r0
  aMax = 10
  hMax = r0*aMax
  r0 = 0.15
  dtReMesh = 2000

Functions
  rn1: Random | funcname = rand; nargs = 4; seed = 4

Variables
  var1 "Variables 1"
    normQ2 = 2 * (q1^2 + q2^2 + q3^2 + q4^2 + q5^2 + q1*q4)
    gradQ11 = -((1 - nx^2)^2*q1Tx) + 2*nx*(1 - nx^2)*ny*q2Tx + 2*nx*(1 - nx^2)*nz*q3Tx - nx^2*nz^2*(-q1Tx - q4Tx) - nx^2*ny^2*q4Tx - 2*nx^2*ny*nz*q5Tx + ((1 - nx^2)*q1Tx - 2*nx*ny*q2Tx - 2*nx*nz*q3Tx + (1 - nz^2)*(-q1Tx - q4Tx) + (1 - ny^2)*q4Tx - 2*ny*nz*q5Tx)/3.
    gradQ12 = -((1 - nx^2)^2*q1Ty) + 2*nx*(1 - nx^2)*ny*q2Ty + 2*nx*(1 - nx^2)*nz*q3Ty - nx^2*nz^2*(-q1Ty - q4Ty) - nx^2*ny^2*q4Ty - 2*nx^2*ny*nz*q5Ty + ((1 - nx^2)*q1Ty - 2*nx*ny*q2Ty - 2*nx*nz*q3Ty + (1 - nz^2)*(-q1Ty - q4Ty) + (1 - ny^2)*q4Ty - 2*ny*nz*q5Ty)/3.
    gradQ13 = -((1 - nx^2)^2*q1Tz) + 2*nx*(1 - nx^2)*ny*q2Tz + 2*nx*(1 - nx^2)*nz*q3Tz - nx^2*nz^2*(-q1Tz - q4Tz) - nx^2*ny^2*q4Tz - 2*nx^2*ny*nz*q5Tz + ((1 - nx^2)*q1Tz - 2*nx*ny*q2Tz - 2*nx*nz*q3Tz + (1 - nz^2)*(-q1Tz - q4Tz) + (1 - ny^2)*q4Tz - 2*ny*nz*q5Tz)/3.
    gradQ21 = nx*(1 - nx^2)*ny*q1Tx - nx^2*ny^2*q2Tx - (1 - nx^2)*(1 - ny^2)*q2Tx - nx^2*ny*nz*q3Tx + (1 - nx^2)*ny*nz*q3Tx - nx*ny*nz^2*(-q1Tx - q4Tx) + nx*ny*(1 - ny^2)*q4Tx - nx*ny^2*nz*q5Tx + nx*(1 - ny^2)*nz*q5Tx
    gradQ22 = nx*(1 - nx^2)*ny*q1Ty - nx^2*ny^2*q2Ty - (1 - nx^2)*(1 - ny^2)*q2Ty - nx^2*ny*nz*q3Ty + (1 - nx^2)*ny*nz*q3Ty - nx*ny*nz^2*(-q1Ty - q4Ty) + nx*ny*(1 - ny^2)*q4Ty - nx*ny^2*nz*q5Ty + nx*(1 - ny^2)*nz*q5Ty
    gradQ23 = nx*(1 - nx^2)*ny*q1Tz - nx^2*ny^2*q2Tz - (1 - nx^2)*(1 - ny^2)*q2Tz - nx^2*ny*nz*q3Tz + (1 - nx^2)*ny*nz*q3Tz - nx*ny*nz^2*(-q1Tz - q4Tz) + nx*ny*(1 - ny^2)*q4Tz - nx*ny^2*nz*q5Tz + nx*(1 - ny^2)*nz*q5Tz
    gradQ31 = nx*(1 - nx^2)*nz*q1Tx - nx^2*ny*nz*q2Tx + (1 - nx^2)*ny*nz*q2Tx - nx^2*nz^2*q3Tx - (1 - nx^2)*(1 - nz^2)*q3Tx + nx*nz*(1 - nz^2)*(-q1Tx - q4Tx) - nx*ny^2*nz*q4Tx - nx*ny*nz^2*q5Tx + nx*ny*(1 - nz^2)*q5Tx
    gradQ32 = nx*(1 - nx^2)*nz*q1Ty - nx^2*ny*nz*q2Ty + (1 - nx^2)*ny*nz*q2Ty - nx^2*nz^2*q3Ty - (1 - nx^2)*(1 - nz^2)*q3Ty + nx*nz*(1 - nz^2)*(-q1Ty - q4Ty) - nx*ny^2*nz*q4Ty - nx*ny*nz^2*q5Ty + nx*ny*(1 - nz^2)*q5Ty
    gradQ33 = nx*(1 - nx^2)*nz*q1Tz - nx^2*ny*nz*q2Tz + (1 - nx^2)*ny*nz*q2Tz - nx^2*nz^2*q3Tz - (1 - nx^2)*(1 - nz^2)*q3Tz + nx*nz*(1 - nz^2)*(-q1Tz - q4Tz) - nx*ny^2*nz*q4Tz - nx*ny*nz^2*q5Tz + nx*ny*(1 - nz^2)*q5Tz
    gradQ41 = -(nx^2*ny^2*q1Tx) + 2*nx*ny*(1 - ny^2)*q2Tx - 2*nx*ny^2*nz*q3Tx - ny^2*nz^2*(-q1Tx - q4Tx) - (1 - ny^2)^2*q4Tx + 2*ny*(1 - ny^2)*nz*q5Tx + ((1 - nx^2)*q1Tx - 2*nx*ny*q2Tx - 2*nx*nz*q3Tx + (1 - nz^2)*(-q1Tx - q4Tx) + (1 - ny^2)*q4Tx - 2*ny*nz*q5Tx)/3.
    gradQ42 = -(nx^2*ny^2*q1Ty) + 2*nx*ny*(1 - ny^2)*q2Ty - 2*nx*ny^2*nz*q3Ty - ny^2*nz^2*(-q1Ty - q4Ty) - (1 - ny^2)^2*q4Ty + 2*ny*(1 - ny^2)*nz*q5Ty + ((1 - nx^2)*q1Ty - 2*nx*ny*q2Ty - 2*nx*nz*q3Ty + (1 - nz^2)*(-q1Ty - q4Ty) + (1 - ny^2)*q4Ty - 2*ny*nz*q5Ty)/3.
    gradQ43 = -(nx^2*ny^2*q1Tz) + 2*nx*ny*(1 - ny^2)*q2Tz - 2*nx*ny^2*nz*q3Tz - ny^2*nz^2*(-q1Tz - q4Tz) - (1 - ny^2)^2*q4Tz + 2*ny*(1 - ny^2)*nz*q5Tz + ((1 - nx^2)*q1Tz - 2*nx*ny*q2Tz - 2*nx*nz*q3Tz + (1 - nz^2)*(-q1Tz - q4Tz) + (1 - ny^2)*q4Tz - 2*ny*nz*q5Tz)/3.
    gradQ51 = -(nx^2*ny*nz*q1Tx) - nx*ny^2*nz*q2Tx + nx*(1 - ny^2)*nz*q2Tx - nx*ny*nz^2*q3Tx + nx*ny*(1 - nz^2)*q3Tx + ny*nz*(1 - nz^2)*(-q1Tx - q4Tx) + ny*(1 - ny^2)*nz*q4Tx - ny^2*nz^2*q5Tx - (1 - ny^2)*(1 - nz^2)*q5Tx
    gradQ52 = -(nx^2*ny*nz*q1Ty) - nx*ny^2*nz*q2Ty + nx*(1 - ny^2)*nz*q2Ty - nx*ny*nz^2*q3Ty + nx*ny*(1 - nz^2)*q3Ty + ny*nz*(1 - nz^2)*(-q1Ty - q4Ty) + ny*(1 - ny^2)*nz*q4Ty - ny^2*nz^2*q5Ty - (1 - ny^2)*(1 - nz^2)*q5Ty
    gradQ53 = -(nx^2*ny*nz*q1Tz) - nx*ny^2*nz*q2Tz + nx*(1 - ny^2)*nz*q2Tz - nx*ny*nz^2*q3Tz + nx*ny*(1 - nz^2)*q3Tz + ny*nz*(1 - nz^2)*(-q1Tz - q4Tz) + ny*(1 - ny^2)*nz*q4Tz - ny^2*nz^2*q5Tz - (1 - ny^2)*(1 - nz^2)*q5Tz
    nf1 = 2*nx*(nx*q1 + ny*q2 + nz*q3) - ((1 + nx^2)*(nx^2*q1 + 2*nx*(ny*q2 + nz*q3) + ny^2*q4 - nz^2*(q1 + q4) + 2*ny*nz*q5))/2.
    nf2 = ny*(nx*q1 + ny*q2 + nz*q3) + nx*(nx*q2 + ny*q4 + nz*q5) - (nx*ny*(nx^2*q1 + 2*nx*(ny*q2 + nz*q3) + ny^2*q4 - nz^2*(q1 + q4) + 2*ny*nz*q5))/2.
    nf3 = nz*(nx*q1 + ny*q2 + nz*q3) + nx*(nx*q3 - nz*(q1 + q4) + ny*q5) - (nx*nz*(nx^2*q1 + 2*nx*(ny*q2 + nz*q3) + ny^2*q4 - nz^2*(q1 + q4) + 2*ny*nz*q5))/2.
    nf4 = 2*ny*(nx*q2 + ny*q4 + nz*q5) - ((1 + ny^2)*(nx^2*q1 + 2*nx*(ny*q2 + nz*q3) + ny^2*q4 - nz^2*(q1 + q4) + 2*ny*nz*q5))/2.
    nf5 = ny*(nx*q3 - nz*(q1 + q4) + ny*q5) + nz*(nx*q2 + ny*q4 + nz*q5) - (ny*nz*(nx^2*q1 + 2*nx*(ny*q2 + nz*q3) + ny^2*q4 - nz^2*(q1 + q4) + 2*ny*nz*q5))/2.

Geometry
  geom1 "Geometry 1" (3D, length unit m)
    ps1: ParametricSurface
      axistype = cartesian
      parmin1 = -R
      parmax1 = R
      parmin2 = -R
      parmax2 = R
      coord = {s1, s2, hMax * exp(-(s1^2 + s2^2)/(2 * r0^2))}
      rtol = 5.0E-4
      maxknots = 40
    blk1: Block (disabled) | axistype = cartesian; base = center; size = {3, 3, 3}
    uni1: Union (disabled) | input = blk1, ps1
    cyl1: Cylinder | pos = {0, 0, -R/2}; r = R; h = R/2 + 1.1*hMax
    csol1: ConvertToSolid | input = cyl1, ps1
    del1: Delete "Delete Entities 1" | input = csol1(1) domains 2
    fin: Finalize "Form Union"

Physics
  gb: GeneralFormBoundaryPDE on boundaries 4
    dependent variable q = {q1, q2, q3, q4, q5}
    gfeq1: GeneralFormPDE (default)
      f = {(1 - normQ2)*q1 - Kn*nf1, (1 - normQ2)*q2 - Kn*nf2, (1 - normQ2)*q3 - Kn*nf3, (1 - normQ2)*q4 - Kn*nf4, (1 - normQ2)*q5 - Kn*nf5}
      Ga = 
        {K*gradQ11, K*gradQ12, K*gradQ13}
        {K*gradQ21, K*gradQ22, K*gradQ23}
        {K*gradQ31, K*gradQ32, K*gradQ33}
        {K*gradQ41, K*gradQ42, K*gradQ43}
        {K*gradQ51, K*gradQ52, K*gradQ53}
      da = {1, 0, 0, 0, 0, 0, 1, 0, 0, 0, 0, 0, 1, 0, 0, 0, 0, 0, 1, 0, 0, 0, 0, 0, 1}
    init1: init "Initial Values 1" (default)
      q1 = pert*rand(x,y,z,1) + 2/3
      q2 = pert*rand(x,y,z,2) - 0 * x*y
      q3 = 0 * pert*rand(x,y,z,3)
      q4 = pert*rand(x,y,z,4) - 1/3
      q5 = 0 * pert*rand(x,y,z,5)
  dg: DeformedGeometry on all domains
    fix1: FixedMesh (default)
    disp1: PrescribedMeshDisplacement (default)
    free1: FreeDeformation on all domains
    disp2: PrescribedMeshDisplacement on boundaries 4 | dx = {0, 0, -hMax/tMax * t *exp(-(x^2+y^2)/(2*r0^2))}
    vel1: PrescribedMeshVelocity (disabled) on boundaries 4 | vx = {0, 0, 0}
    znmd1: ZeroNormalMeshDisplacement (disabled) on boundaries 1, 2, 5, 6

Mesh
  mesh1 "Mesh 1"
    size: MeshSizeDefault | hmax = r0/4; hmin = r0/8; custom = on
    ftri1: FreeTri "Free Triangular 1" on boundaries 4 | method = del
      se1: SizeExpression (disabled) on entire geometry
    ftet1: FreeTet "Free Tetrahedral 1" on domains 1
      size1: Size on domains 1 | hmax = 2*r0; custom = on

Studies
  std1 "Study 1"
    time: Transient "Time Dependent" | tlist = range(0,tMax/200,tMax); usertol = on; rtol = 1e-4

Solver configurations
  sol1 "Solution 1" (study std1)
    v1: Variables "Dependent Variables 1"
    t1: Time "Time-Dependent Solver 1" | tlist = range(0,tMax/200,tMax); atolglobal = 1e-5
      dDef: Direct | linsolver = pardiso
      fc1: FullyCoupled | linsolver = dDef
      ar1: AutoRemesh "Automatic Remeshing 1"
        stopcondtype = spectime
        remeshtimes = range(dtReMesh,dtReMesh,tMax-1)
        consistentremesh = on
  sol2 "Remeshed Solution 1" (study std1)

Datasets
  dset1: Solution | solution = sol1
  mesh1: Mesh | mesh = mesh1
  dset2: Solution | solution = sol2
  surf1: Surface on boundaries 4 | data = dset2

Plots
  pg1: PlotGroup3D "Normal component" | data = dset1
    surf1: Surface | expr = (nx*q1 + ny*q2 + nz*q3)^2 + (nx*q2 + ny*q4 + nz*q5)^2 + ( nx*q3 + nz*(-q1 - q4) + ny*q5 )^2
  pg2: PlotGroup3D "Q-tensor Magnitude" | data = dset2
    surf1: Surface | expr = normQ2
    arws1: ArrowSurface
      expr = {sqrt(abs(0.5*(1 - nx^2) + (q1)/sqrt(2*normQ2))) * sign( q3/sqrt(2*normQ2) - nx*nz/2 ), sqrt(abs(0.5*(1 - ny^2) + (q4)/sqrt(2*normQ2))) * sign( q5/sqrt(2*normQ2) - ny*nz/2 ), sqrt(abs(0.5*(1 - nz^2) + (-q1 - q4)/sqrt(2*normQ2)))}
      arrowcount = 800
    arws2: ArrowSurface
      expr = {-sqrt(abs(0.5*(1 - nx^2) + (q1)/sqrt(2*normQ2))) * sign( q3/sqrt(2*normQ2) - nx*nz/2 ), -sqrt(abs(0.5*(1 - ny^2) + (q4)/sqrt(2*normQ2))) * sign( q5/sqrt(2*normQ2) - ny*nz/2 ), -sqrt(abs(0.5*(1 - nz^2) + (-q1 - q4)/sqrt(2*normQ2)))}
      arrowcount = 800
  pg3: PlotGroup3D "3D Plot Group 3" | data = dset1
    surf1: Surface | expr = nf2
    arws1: ArrowSurface | expr = {nx, ny, nz}
  pg4: PlotGroup1D "1D Plot Group 4" | data = dset1
  pg5: PlotGroup3D "3D Plot Group 5" | data = dset1
  pg6: PlotGroup3D "Mesh Plot 6" | data = dset2
    mesh1: Mesh | meshdomain = volume
  pg7: PlotGroup3D "3D Plot Group 7" | data = dset2
    surf1: Surface | expr = q1

Exports
  data1: Data
    data = surf1
    expr = {q1, q2, q3, q4, q5, x, y, z}
    exporttype = vtu
    filename = /data/Surface Q-tensor/Gaussian Bump/shrinking-bump_t=18000-20000.vtu
    level = surface
    lagorder = 2
  mesh1: Mesh
    data = dset1
    type3D = stlascii
    filename = /Users/Fridtjof.Brauns/KITP/Surface Q-tensor/COMSOL/ellipsoid_mesh_R=6_aspect=2_h=0.5.stl
  anim1: Animation
    type = imageseq
    sweeptype = globalparameter
    globalparameter = theta
    globalpstop = 2*pi
    maxframes = 60
    size = current
    width = 480